<?xml version="1.0" ?>
<!--
  BEWARE these data are wrong, , some basic values are cpopied from the Concorde/Olympus engine, most of them only empiric/estimated in order to give a flying model, my apologize for it  , the realistics data will  come later on, i hope.
  gh robin
  -->
    <turbine_engine name="SR71_Engine">
  <milthrust> 31350 </milthrust>
  <maxthrust> 37080 </maxthrust>
  <bypassratio> 0.0 </bypassratio>
  <tsfc> 1.144 </tsfc>
  <atsfc> 1.338 </atsfc>
  <idlen1> 30.0 </idlen1>
  <idlen2> 60.0 </idlen2>
  <maxn1> 102.0 </maxn1>
  <maxn2> 106.0 </maxn2>
  <augmented> 1 </augmented>
  <augmethod> 1 </augmethod>
  <injected> 0 </injected>


 <function name="IdleThrust">
  <table>
   <independentVar lookup="row">velocities/mach</independentVar>
   <independentVar lookup="column">atmosphere/density-altitude</independentVar>
   <tableData>
          -10000      0  10000  20000  30000  40000  50000  60000
    0.0   0.0430 0.0488 0.0528 0.0694 0.0899 0.1183 0.1467 0.0792
    0.2   0.0500 0.0501 0.0335 0.0544 0.0797 0.1049 0.1342 0.0725
    0.4   0.0040 0.0047 0.0020 0.0272 0.0595 0.0891 0.1203 0.0650
    0.6   0.0    0.0    0.0    0.0    0.0276 0.0718 0.1073 0.0579
    0.8   0.0    0.0    0.0    0.0    0.0474 0.0868 0.0900 0.0486
    1.0   0.0    0.0    0.0    0.0    0.0    0.0552 0.0800 0.0432
    1.2   0.0    0.0    0.0    0.0    0.0    0.0530 0.0768 0.0415
    1.4   0.0    0.0    0.0    0.0    0.0    0.0519 0.0753 0.0407
    1.6   0.0    0.0    0.0    0.0    0.0    0.0    0.0745 0.0403
    1.8   0.0    0.0    0.0    0.0    0.0    0.0    0.0723 0.0391
    2.0   0.0    0.0    0.0    0.0    0.0    0.0    0.0680 0.0368
    2.2   0.0    0.0    0.0    0.0    0.0    0.0    0.0605 0.0328

   </tableData>
  </table>
 </function>


 <function name="MilThrust">
  <table>
   <independentVar lookup="row">velocities/mach</independentVar>
   <independentVar lookup="column">atmosphere/density-altitude</independentVar>
   <tableData>
          -10000      0         10000  20000  30000  40000  50000  60000 70000 120000
    0.0   1.2600 1.0000 0.7400 0.5340 0.3720 0.2410 0.1490 0.0805 0.0498 0.010
    0.2   1.1710 0.9340 0.6970 0.5060 0.3550 0.2310 0.1430 0.0772 0.0478 0.010
    0.4   1.1500 0.9210 0.6920 0.5060 0.3570 0.2330 0.1450 0.0783 0.0485 0.010
    0.6   1.1810 0.9510 0.7210 0.5320 0.3780 0.2480 0.1540 0.0832 0.0515 0.010
    0.8   1.2580 1.0200 0.7820 0.5820 0.4170 0.2750 0.1700 0.0918 0.0568 0.010
    1.0   1.3690 1.1200 0.8710 0.6510 0.4750 0.3150 0.1950 0.1053 0.0652 0.010
    1.2   1.4850 1.2300 0.9750 0.7440 0.5450 0.3640 0.2250 0.1215 0.0752 0.010
    1.3   1.5396 1.2850 1.0305 0.7945 0.5865 0.3940 0.2440 0.1318 0.0816 0.010
    1.4   1.9129 1.6080 1.3032 1.0140 0.7536 0.5088 0.3156 0.1704 0.6196 0.010
    1.6   2.0895 1.7636 1.4377 1.1571 0.9142 0.6464 0.4004 0.2202 0.1364 0.010
    1.8   2.6159 2.2043 1.7928 1.4382 1.1333 0.7997 0.4955 0.2725 0.1688 0.010
    2.0   3.6096 3.0945 2.5793 2.0644 1.6192 1.1405 0.7066 0.3888 0.2409 0.010
    2.2   3.4042 2.9203 2.4365 2.1427 1.5725 1.0989 0.6809 0.3745 0.2320 0.010
    3.7   1.9129 1.6080 1.3032 1.0140 0.7536 0.5088 0.3156 0.1704 0.1055 0.010
   </tableData>
  </table>
 </function>


  <function name="AugThrust">
   <table>
    <independentVar lookup="row">velocities/mach</independentVar>
    <independentVar lookup="column">atmosphere/density-altitude</independentVar>
    <tableData>
          -10000      0      10000  25000  35000  45000  55000  65000 85000 110000 140000
    0.0   1.2411 1.0529 0.8648 0.7017 0.5596 0.3983 0.2467 0.1357 0.0840 0.0520 0.010
    0.2   1.2411 1.0529 0.8648 0.7017 0.5596 0.3983 0.2467 0.1357 0.0840 0.0520 0.010
    0.4   1.2411 1.0529 0.8648 0.7017 0.5596 0.3983 0.2467 0.1357 0.0840 0.0520 0.010
    0.6   1.2411 1.0529 0.8648 0.7017 0.5596 0.3983 0.2467 0.1357 0.0840 0.0520 0.010
    0.8   1.3287 1.1254 0.9221 0.7462 0.5936 0.4219 0.2614 0.1438 0.0891 0.0552 0.010
    1.0   1.3826 1.1702 0.9577 0.7742 0.6148 0.4364 0.2704 0.1488 0.0922 0.0571 0.010
    1.4   1.7238 1.4579 1.1920 0.9625 0.7632 0.5411 0.3353 0.1846 0.1143 0.0708 0.010
    1.6   2.1995 1.8564 1.5132 1.2180 0.9224 0.6804 0.4215 0.2318 0.1436 0.0889 0.010
    1.8   3.1142 2.6242 2.1343 1.7122 1.3491 0.9520 0.5899 0.3244 0.2010 0.1245 0.010
    2.0   4.9945 4.2390 3.5332 2.8280 2.2183 1.5622 0.9680 0.5324 0.3298 0.2040 0.010
    2.2   4.9250 4.2250 3.5250 3.1000 2.2750 1.5898 0.9850 0.5418 0.3357 0.2088 0.010
    2.8   4.9250 4.2250 3.5250 3.1000 2.2750 1.5898 0.9850 0.5418 0.3357 0.2088 0.010
    4.2  3.1142 2.6242 2.1343 1.7122 1.3491 0.9520 0.5899 0.3244 0.2010 0.1245 0.010
   </tableData>
  </table>
 </function>


</turbine_engine>
