<?xml version="1.0"?>
<?xml-stylesheet href="http://jsbsim.sourceforge.net/JSBSim.xsl" type="text/xsl"?>
<fdm_config name="SR-71" version="2.0" release="BETA"
 xmlns:xsi="http://www.w3.org/2001/XMLSchema-instance"
 xsi:noNamespaceSchemaLocation="http://jsbsim.sourceforge.net/JSBSim.xsd">

    <fileheader>
        <author> Aeromatic based  mod Gerard Robin</author>
        <filecreationdate> 2005-24-06</filecreationdate>
        <version> 0.12 </version>
        <description> Models a SR-71 </description>
        <documentation>
            Manufacturer: Lockheed Aircraft Corporation
            Length:107' 5"
            Length of Nose Probe:4' 11"
            Wing Span:55' 7"
            Wing Area:1,795 ft. sq.
            Wing Aspect Ratio:1.939
            Wing Root Chord:60.533
            Wing Dihedral Angle:0 degrees
            Wing Chord:0.00
            Wing Sweep:52.629 degrees
            Inboard Elevon Area:39.00 ft. sq.
            Outboard Elevon Area:52.50 ft. sq.
            Total Vertical Rudder Area:150.76 ft. sq.
            Moveable Rudder Area:70.24 ft. sq.
            Rudder Root Chord:14.803 ft.
            Rudder Tip Chord:7.833 ft.
            Height:18' 6"
            Empty Weight:59,000 lbs.
            Maximum Weight:170,000 lbs.
            Fuselage Diameter:5.33 ft.
            Service Ceiling:85,000'+
            Maximum Speed:Mach 3.3+ (Limit CIT of 427 degrees C)
            Cruising Speed:Mach 3.2
            Engines:2 Pratt  Whittney J-58 (JT11D-20A) with 34,000 lbs. of thrust.
            Range:3,200 nautical miles without refueling
        </documentation>
    </fileheader>

    <metrics>
        <wingarea unit="FT2"> 1795 </wingarea>
        <wingspan unit="FT"> 55.7 </wingspan>
        <chord unit="FT"> 42.12 </chord>
        <htailarea unit="FT2"> 0 </htailarea>
        <htailarm unit="FT"> 0 </htailarm>
        <vtailarea unit="FT2"> 323.1 </vtailarea>
        <vtailarm unit="FT"> 0 </vtailarm>
        <location name="AERORP" unit="IN">
            <x> 0 </x>
            <y> 0 </y>
            <z> 0 </z>
        </location>
        <location name="EYEPOINT" unit="IN">
            <x> -533.46 </x>
            <y> 0 </y>
            <z> 38 </z>
        </location>
        <location name="VRP" unit="IN">
            <x> -430 </x>
            <y> 0 </y>
            <z> 0 </z>
        </location>
    </metrics>

    <mass_balance>
        <ixx unit="SLUG*FT2"> 516572 </ixx>
        <iyy unit="SLUG*FT2"> 2.64484e+06 </iyy>
        <izz unit="SLUG*FT2"> 2.21601e+06 </izz>
        <ixy unit="SLUG*FT2"> 0 </ixy>
        <ixz unit="SLUG*FT2"> 0 </ixz>
        <iyz unit="SLUG*FT2"> 0 </iyz>
        <emptywt unit="LBS"> 59000</emptywt>
        <location name="CG" unit="IN">
            <x> 0 </x>
            <y> 0 </y>
            <z> -32.3 </z>
        </location>
    </mass_balance>

    <ground_reactions>
        <contact type="BOGEY" name="NOSE">
            <location unit="IN">
                <x> -360.23 </x>
                <y> 0 </y>
                <z> -75.98 </z>
            </location>
            <static_friction> 0.8 </static_friction>
            <dynamic_friction> 0.5 </dynamic_friction>
            <rolling_friction> 0.02 </rolling_friction>
            <spring_coeff unit="LBS/FT"> 70000 </spring_coeff>
            <damping_coeff unit="LBS/FT/SEC"> 17000 </damping_coeff>
            <max_steer unit="DEG"> 5 </max_steer>
            <brake_group> NONE </brake_group>
            <retractable>1</retractable>
            <relaxation_velocity>
              <rolling unit="FT/SEC">0.7</rolling>
              <side unit="FT/SEC">0.7</side>
            </relaxation_velocity>
            <force_lag_filter>
              <rolling> 120.0 </rolling>
              <side> 120.0 </side>
            </force_lag_filter>
            <wheel_slip_filter> 120.0 </wheel_slip_filter>
        </contact>
        <contact type="BOGEY" name="MLG_LEFT">
            <location unit="IN">
                <x> 78.34 </x>
                <y> -54 </y>
                <z> -75.98 </z>
            </location>
            <static_friction> 0.8 </static_friction>
            <dynamic_friction> 0.5 </dynamic_friction>
            <rolling_friction> 0.02 </rolling_friction>
            <spring_coeff unit="LBS/FT"> 170000 </spring_coeff>
            <damping_coeff unit="LBS/FT/SEC"> 34000 </damping_coeff>
            <max_steer unit="DEG"> 0.0 </max_steer>
            <brake_group> LEFT </brake_group>
            <retractable>1</retractable>
            <relaxation_velocity>
              <rolling unit="FT/SEC">0.7</rolling>
              <side unit="FT/SEC">0.7</side>
            </relaxation_velocity>
            <force_lag_filter>
              <rolling> 120.0 </rolling>
              <side> 120.0 </side>
            </force_lag_filter>
            <wheel_slip_filter> 120.0 </wheel_slip_filter>
        </contact>
        <contact type="BOGEY" name="MLG_RIGHT">
            <location unit="IN">
                <x> 78.34 </x>
                <y> 54 </y>
                <z> -75.98 </z>
            </location>
            <static_friction> 0.8 </static_friction>
            <dynamic_friction> 0.5 </dynamic_friction>
            <rolling_friction> 0.02 </rolling_friction>
            <spring_coeff unit="LBS/FT"> 170000 </spring_coeff>
            <damping_coeff unit="LBS/FT/SEC"> 34000 </damping_coeff>
            <max_steer unit="DEG"> 0.0 </max_steer>
            <brake_group> RIGHT </brake_group>
            <retractable>1</retractable>
            <relaxation_velocity>
              <rolling unit="FT/SEC">0.7</rolling>
              <side unit="FT/SEC">0.7</side>
            </relaxation_velocity>
            <force_lag_filter>
              <rolling> 120.0 </rolling>
              <side> 120.0 </side>
            </force_lag_filter>
            <wheel_slip_filter> 120.0 </wheel_slip_filter>
        </contact>
        <contact type="STRUCT" name="WT_LEFT">
            <location unit="IN">
                <x> 88.2 </x>
                <y> -257 </y>
                <z> -27 </z>
            </location>
            <static_friction> 0.2 </static_friction>
            <dynamic_friction> 0.2 </dynamic_friction>
            <spring_coeff unit="LBS/FT"> 10000 </spring_coeff>
            <damping_coeff unit="LBS/FT/SEC"> 20000 </damping_coeff>
        </contact>
        <contact type="STRUCT" name="WT_RIGHT">
            <location unit="IN">
                <x> 88.2 </x>
                <y> 257 </y>
                <z> -27 </z>
            </location>
            <static_friction> 0.2 </static_friction>
            <dynamic_friction> 0.2 </dynamic_friction>
            <spring_coeff unit="LBS/FT"> 100000 </spring_coeff>
            <damping_coeff unit="LBS/FT/SEC"> 20000 </damping_coeff>
        </contact>
        <contact type="STRUCT" name="VT_LEFT">
            <location unit="IN">
                <x> 227.4 </x>
                <y> -69.7 </y>
                <z> 140.8 </z>
            </location>
            <static_friction> 0.2 </static_friction>
            <dynamic_friction> 0.2 </dynamic_friction>
            <spring_coeff unit="LBS/FT"> 100000 </spring_coeff>
            <damping_coeff unit="LBS/FT/SEC"> 20000 </damping_coeff>
        </contact>
        <contact type="STRUCT" name="VT_RIGHT">
            <location unit="IN">
                <x> 227.4 </x>
                <y> 69.7 </y>
                <z> 140.8 </z>
            </location>
            <static_friction> 0.2 </static_friction>
            <dynamic_friction> 0.2 </dynamic_friction>
            <spring_coeff unit="LBS/FT"> 100000 </spring_coeff>
            <damping_coeff unit="LBS/FT/SEC"> 20000 </damping_coeff>
        </contact>
        <contact type="STRUCT" name="RADOME">
            <location unit="IN">
                <x> -468.7 </x>
                <y> 0 </y>
                <z> 0 </z>
            </location>
            <static_friction> 0.2 </static_friction>
            <dynamic_friction> 0.2 </dynamic_friction>
            <spring_coeff unit="LBS/FT"> 100000 </spring_coeff>
            <damping_coeff unit="LBS/FT/SEC"> 20000 </damping_coeff>
        </contact>
        <contact type="STRUCT" name="BELLY">
            <location unit="IN">
                <x> -7 </x>
                <y> 0 </y>
                <z> -20 </z>
            </location>
            <static_friction> 0.2 </static_friction>
            <dynamic_friction> 0.2 </dynamic_friction>
            <spring_coeff unit="LBS/FT"> 100000 </spring_coeff>
            <damping_coeff unit="LBS/FT/SEC"> 20000 </damping_coeff>
        </contact>
    </ground_reactions>
    <propulsion>
            <engine file="SR-71_engine">
            <location unit="IN">
                <x> 0 </x>
                <y> -111.4 </y>
                <z> -40 </z>
            </location>
            <orient unit="DEG">
                <roll> 0.0 </roll>
                <pitch> 0 </pitch>
                <yaw> 0 </yaw>
            </orient>
            <feed>0</feed>
            <feed>1</feed>
            <thruster file="direct-new">
                <location unit="IN">
                    <x> 0 </x>
                    <y> -111.4 </y>
                    <z> -40 </z>
                </location>
                <orient unit="DEG">
                    <roll> 0.0 </roll>
                    <pitch> -1.0 </pitch>
                    <yaw> 0.0 </yaw>
                </orient>
            </thruster>
        </engine>
        <engine file="SR-71_engine">
            <location unit="IN">
                <x> 0 </x>
                <y> 111.4 </y>
                <z> -40 </z>
            </location>
            <orient unit="DEG">
                <roll> 0.0 </roll>
                <pitch> 0 </pitch>
                <yaw> 0 </yaw>
            </orient>
            <feed>0</feed>
            <feed>1</feed>
            <thruster file="direct-new">
                <location unit="IN">
                    <x> 774 </x>
                    <y> 111.4 </y>
                    <z> -40 </z>
                </location>
                <orient unit="DEG">
                    <roll> 0.0 </roll>
                    <pitch> -1.0 </pitch>
                    <yaw> 0.0 </yaw>
                </orient>
            </thruster>
        </engine>
        <tank type="FUEL">    <!-- Tank number 0 -->
            <location unit="IN">
                <x> 0 </x>
                <y> 0 </y>
                <z> -32.25 </z>
            </location>
            <capacity unit="LBS"> 30000 </capacity>
            <contents unit="LBS"> 15000 </contents>
        </tank>
        <tank type="FUEL">    <!-- Tank number 1 -->
            <location unit="IN">
                <x> 0 </x>
                <y> 0 </y>
                <z> -32.25 </z>
            </location>
            <capacity unit="LBS"> 55000 </capacity>
            <contents unit="LBS"> 30000 </contents>
        </tank>
        <tank type="FUEL">    <!-- Tank number 1 -->
            <location unit="IN">
                <x> 0 </x>
                <y> 0 </y>
                <z> -32.25 </z>
            </location>
            <capacity unit="LBS"> 1 </capacity>
            <contents unit="LBS"> 0 </contents>
        </tank>
    </propulsion>

    <flight_control name="FCS: SR-71">
        <property>fcs/canopy-cmd-norm</property>
        <property>fcs/canopy-pos-norm</property>
        <property>/controls/flight/probe-refuel</property>
        <property>fcs/refueling-pos-norm</property>
        <property>fcs/chute-cmd-norm</property>
        <property>fcs/chute-pos-norm</property>
        <property>fcs/chute-pos-deg</property>
        <property>fcs/pitch-deg</property>
        <property>/consumables/fuel/total-fuel-gals</property>
        <property>fcs/fuel-tank0-level-gal_us</property>
        <property>fcs/fuel-tank0-cpty-level-gal_us</property>
        <property>fcs/fuel-tank0-level-gal_us-load</property>
        <property>fcs/fuel-tank1-level-gal_us</property>
        <property>fcs/fuel-tank2-level-gal_us</property>
        <property>fcs/refuel-cmd</property>
        <property>fcs/aileron-pos-norm</property>
        <property>fcs/lighting-instruments-norm</property>
        <property>fcs/chute-switch-once</property>
        <property>fcs/chute-switch-count</property>
        <property>/instrumentation/lights/blinker-kinemat-in</property>
        <property>/instrumentation/lights/blinker-kinemat-out</property>
        <property>/instrumentation/lights/beacon-on</property>
        <property>fcs/cutoff-switch</property>
	<property>gear/gear-cp-pos-norm</property>
        <property>gear/gear-cp-cmd-norm</property>


     <channel name="Pitch">
        <summer name="Pitch Trim Sum">
            <input>fcs/elevator-cmd-norm</input>
            <input>fcs/pitch-trim-cmd-norm</input>
            <clipto>
                <min>-1</min>
                <max>1</max>
            </clipto>
            <output>fcs/elevator-pos-norm</output>
        </summer>

        <aerosurface_scale name="Elevator Control">
            <input>fcs/pitch-trim-sum</input>
            <range>
                <min>-0.35</min>
                <max>0.3</max>
            </range>
            <output>fcs/elevator-pos-rad</output>
        </aerosurface_scale>
    </channel>


    <channel name="Roll">
        <summer name="Roll Trim Sum">
            <input>fcs/aileron-cmd-norm</input>
            <input>fcs/roll-trim-cmd-norm</input>
            <clipto>
                <min>-1</min>
                <max>1</max>
            </clipto>
            <output>fcs/aileron-pos-norm</output>
        </summer>

        <pure_gain name="Aileron Position">
            <input>fcs/aileron-pos-norm</input>
            <gain>1</gain>
            <output>/surface-positions/aileron-pos-norm</output>
        </pure_gain>

        <aerosurface_scale name="Left Aileron Control">
            <input>fcs/roll-trim-sum</input>
            <range>
                <min>-0.35</min>
                <max>0.35</max>
            </range>
            <output>fcs/left-aileron-pos-rad</output>
        </aerosurface_scale>

        <aerosurface_scale name="Right Aileron Control">
            <input>-fcs/roll-trim-sum</input>
            <range>
                <min>-0.35</min>
                <max>0.35</max>
            </range>
            <output>fcs/right-aileron-pos-rad</output>
        </aerosurface_scale>
    </channel>

    <channel name="Yaw">
        <summer name="Rudder Command Sum">
            <input>fcs/rudder-cmd-norm</input>
            <input>fcs/yaw-trim-cmd-norm</input>
            <clipto>
                <min>-1</min>
                <max>1</max>
            </clipto>
        </summer>


        <scheduled_gain name="Yaw Damper Rate">
            <input>velocities/r-aero-rad_sec</input>
            <table>
                <independentVar>aero/qbar-psf</independentVar>
                <tableData>
                    3.0000    0.0000
                    11.0000    2.0000
                </tableData>
            </table>
        </scheduled_gain>

        <scheduled_gain name="Yaw Damper Beta">
            <input>aero/beta-rad</input>
            <table>
                <independentVar>aero/qbar-psf</independentVar>
                <tableData>
                    3.0000    0.0000
                    11.0000    0.0000
                </tableData>
            </table>
        </scheduled_gain>

        <summer name="Yaw Damper Sum">
            <input>fcs/yaw-damper-beta</input>
            <input>fcs/yaw-damper-rate</input>
            <clipto>
                <min>-0.2000</min>
                <max>0.2000</max>
            </clipto>
        </summer>

        <scheduled_gain name="Yaw Damper Final">
            <input>fcs/yaw-damper-sum</input>
            <table>
                <independentVar>aero/qbar-psf</independentVar>
                <tableData>
                    2.9900    0.0000
                    3.0000    1.0000
                </tableData>
            </table>
        </scheduled_gain>

        <summer name="Rudder Sum">
            <input>fcs/rudder-command-sum</input>
            <input>fcs/yaw-damper-final</input>
            <clipto>
                <min>-1.0000</min>
                <max>1.0000</max>
            </clipto>
            <output>fcs/rudder-pos-norm</output>
        </summer>

        <aerosurface_scale name="Rudder Control">
            <input>fcs/rudder-sum</input>
            <range>
                <min>-0.2000</min>
                <max>0.2000</max>
            </range>
            <output>fcs/rudder-pos-rad</output>
        </aerosurface_scale>

        <scheduled_gain name="Scheduled Steer Cmd Deg">
                <input>fcs/steer-cmd-norm</input>
                <table>
                    <independentVar>velocities/vg-fps</independentVar>
                    <tableData>
                        10.0000	80.0000
                        50.0000	15.0000
                        150.0000	2.0000
                    </tableData>
                </table>
                <output>fcs/steer-pos-deg</output>
            </scheduled_gain>
    </channel>


    <channel name="g Load">
            <summer name="constant one">
                <input>fcs/aileron-cmd-norm</input>
                <clipto>
                    <min>1.0000</min>
                    <max>1.0000</max>
                </clipto>
            </summer>

            <summer name="g load">
                <input>-accelerations/n-pilot-z-norm</input>
                <input>-fcs/constant-one</input>
            </summer>

            <pure_gain name="g load norm">
                <input>fcs/g-load</input>
                <gain>0.1000</gain>
            </pure_gain>

            <summer name="neg g load norm">
                <input>fcs/g-load-norm</input>
                <clipto>
                    <min>-1.0000</min>
                    <max>0.0000</max>
                </clipto>
            </summer>

            <summer name="pos g load norm">
                <input>fcs/g-load-norm</input>
                <clipto>
                    <min>0.0000</min>
                    <max>1.0000</max>
                </clipto>
            </summer>

            <summer name="abs g load norm">
                <input>fcs/pos-g-load-norm</input>
                <input>-fcs/neg-g-load-norm</input>
            </summer>

            <summer name="g blend scheduler">
                <input>fcs/abs-g-load-norm</input>
                <input>velocities/mach</input>
            </summer>

            <scheduled_gain name="g load blend">
                <input>fcs/g-load-norm</input>
                <table>
                    <independentVar>fcs/g-blend-scheduler</independentVar>
                    <tableData>
                        0.0000	0.0000
                        1.0000	1.0000
                    </tableData>
                </table>
            </scheduled_gain>

            <pure_gain name="alpha norm">
                <input>aero/alpha-deg</input>
                <gain>0.0200</gain>
            </pure_gain>

            <scheduled_gain name="scheduled alpha norm">
                <input>fcs/alpha-norm</input>
                <table>
                    <independentVar>fcs/g-blend-scheduler</independentVar>
                    <tableData>
                        0.0000	1.0000
                        1.2000	0.0000
                    </tableData>
                </table>
            </scheduled_gain>

            <pure_gain name="pitch rate gain">
                <input>velocities/q-aero-rad_sec</input>
                <gain>1</gain>
            </pure_gain>

            <summer name="pitch cmd error">
                <input>fcs/pitch-trim-sum</input>
                <input>fcs/g-load-norm</input>
                <input>fcs/scheduled-alpha-norm</input>
                <input>fcs/pitch-rate-gain</input>
            </summer>

            <scheduled_gain name="g load p">
                <input>fcs/pitch-cmd-error</input>
                <table>
                    <independentVar>velocities/mach</independentVar>
                    <tableData>
                        0.2000	0.5000
                        1.8000	0.1000
                    </tableData>
                </table>
            </scheduled_gain>

            <integrator name="g load i">
                <input>fcs/pitch-cmd-error</input>
                <c1>0.0050</c1>
            </integrator>

            <lead_lag_filter name="g load d">
                <input>fcs/pitch-cmd-error</input>
                <c1>0.0010</c1>
                <c2>0.0001</c2>
                <c4>1.0000</c4>
            </lead_lag_filter>

            <summer name="g load command">
                <input>fcs/g-load-p</input>
                <clipto>
                    <min>-1.0000</min>
                    <max>1.0000</max>
                </clipto>
            </summer>

            <scheduled_gain name="pitch cmd norm">
                <input>fcs/g-load-command</input>
                <table>
                    <independentVar>velocities/mach</independentVar>
                    <tableData>
                        0.2000	1.0000
                        1.8000	1.0000
                    </tableData>
                </table>
            </scheduled_gain>
    </channel>

    <channel name="Landing Gear">

            <switch name="Gear Switch">
                <default value="/controls/gear/gear-down"/>
                <test  logic="AND" value="0">
                    /environment/terrain  == 0
                    position/h-agl-ft lt 40
                    position/h-sl-ft  lt position/h-agl-ft
                </test>
                <output>gear/gear-cp-cmd-norm</output>
            </switch>

            <kinematic name="Gear Control">
                <input>gear/gear-cp-cmd-norm</input>
                <traverse>
                    <setting>
                        <position>0</position>
                        <time>0</time>
                    </setting>
                    <setting>
                        <position>1</position>
                        <time>0.3</time>
                    </setting>
                </traverse>
                <output>gear/gear-pos-norm</output>
            </kinematic>

            <kinematic name="Gear Surface Position">
                <input>/controls/gear/gear-down</input>
                <traverse>
                    <setting>
                        <position>0</position>
                        <time>0</time>
                    </setting>
                    <setting>
                        <position>1</position>
                        <time>5</time>
                    </setting>
                </traverse>
                <output>/surface-positions/gear-pos-norm</output>
            </kinematic>

            <switch name="Drag Terrain Factor Switch">
                <default value="0"/>
                <test  logic="AND" value="1">
                    /environment/terrain  == 1
                    /position/altitude-agl-ft lt 7
                    fcs/gear-surface-position == 0
                </test>
            </switch>
            <switch name="Drag Gear In Water Switch">
                <default value="0"/>
                <test  logic="AND" value="1">
                    /environment/terrain  == 0
                    /position/altitude-agl-ft lt 8
                   fcs/gear-surface-position == 1
                </test>
            </switch>


	    <switch  name="Wheel Rotation Factor">
		    <default value="0"/>
                <test  logic="AND" value="1">
                    /position/altitude-agl-ft lt 7
                   fcs/gear-surface-position == 1
                </test>
	    </switch>

	    <pure_gain name="Wheel Rotation">
		<input>velocities/u-fps</input>
		<gain>fcs/wheel-rotation-factor</gain>
	    </pure_gain>

    </channel>


    <channel name="Canopy">
        <kinematic name="Canopy">
            <input>fcs/canopy-cmd-norm</input>
            <traverse>
                <setting>
                    <position>0.0000</position>
                    <time>0.0000</time>
                </setting>
                <setting>
                    <position>1.0000</position>
                    <time>5.0000</time>
                </setting>
            </traverse>
            <output>fcs/canopy-pos-norm</output>
        </kinematic>

     <pure_gain name="Canopy Surface">
        <input>fcs/canopy-pos-norm</input>
        <gain>1</gain>
        <output>/surface-positions/canopy-pos-norm</output>
    </pure_gain>

    </channel>

     <channel name="Refuel Probe">
        <kinematic name="Probe Refueling Control">
            <input>/controls/flight/probe-refuel</input>
            <traverse>
                <setting>
                    <position>0.0000</position>
                    <time>5.0000</time>
                </setting>
                <setting>
                    <position>1.0000</position>
                    <time>5.0000</time>
                </setting>
            </traverse>
            <output>fcs/refueling-pos-norm</output>
        </kinematic>

        <pure_gain name="Probe Refueling Surface">
            <input>fcs/refueling-pos-norm</input>
            <gain>1</gain>
            <output>/surface-positions/refueling-pos-norm</output>
        </pure_gain>

     </channel>


     <channel name="Fuel">

        <summer name="Tank Total Gals">
            <input>/consumables/fuel/tank[0]level-gal_us</input>
            <input>/consumables/fuel/tank[1]level-gal_us</input>
            <input>/consumables/fuel/tank[2]level-gal_us</input>
            <clipto>
                <min>0</min>
                <max>13637</max>
            </clipto>
            <output>/consumables/fuel/total-fuel-gals</output>
        </summer>

    </channel>


    <channel name="Drag Chute">
            <kinematic name="Chute Control">
                <input>fcs/chute-cmd-norm</input>
                <traverse>
                    <setting>
                        <position>0.0000</position>
                        <time>0.0000</time>
                    </setting>
                    <setting>
                        <position>1.0000</position>
                        <time>4.7500</time>
                    </setting>
                </traverse>
                <output>fcs/chute-pos-norm</output>
            </kinematic>

        <pure_gain name="Drag Chute Surface">
            <input>fcs/chute-pos-norm</input>
            <gain>1</gain>
            <output>/surface-positions/chute-pos-norm</output>
        </pure_gain>


        <pure_gain name="Chute Command">
            <input>/sim/model/controls/chute</input>
            <gain>1</gain>
            <output>fcs/chute-cmd-norm</output>
        </pure_gain>

        <switch name="Brake Chute Deploy">
            <default value="0"/>
            <test  logic="AND" value="1">
                fcs/chute-pos-norm == 1
                velocities/vc-kts lt 200
                velocities/vc-kts gt 50
                position/h-agl-ft lt  20
                fcs/throttle-pos-norm  lt 0.1
            </test>
        </switch>
       <!-- temoin ouverture 1 fois du parachute   chute-switch-count= 1  sans retour-->
        <switch name="Chute Count">
            <default value="0"/>
            <test  logic="AND" value="1">
                fcs/brake-chute-deploy == 1
                fcs/chute-switch-count == 0
            </test>
            <test  logic="AND" value="1">
                fcs/chute-switch-count == 1
            </test>
            <output>fcs/chute-switch-count</output>
        </switch>
        <!--empeche l'usage une seconde fois  chute-switch-once=1 sans retour -->
        <switch name="Chute Once">
            <default value="0"/>
            <test  logic="AND" value="1">
                fcs/brake-chute-deploy == 0
                fcs/chute-switch-count == 1
                fcs/chute-switch-once == 0
            </test>
            <test  logic="AND" value="1">
                fcs/chute-switch-once == 1
            </test>
            <output>fcs/chute-switch-once</output>
        </switch>


        <switch name="Brake Chute Resource">
            <default value="0"/>
            <test  logic="AND" value="1">
                fcs/brake-chute-deploy == 1
                fcs/chute-switch-once == 0
            </test>
        </switch>

        <kinematic name="Brake Chute Selector">
            <input>fcs/brake-chute-resource</input>
            <traverse>
                <setting>
                    <position>0.0000</position>
                    <time>0.0000</time>
                </setting>
                <setting>
                    <position>1.0000</position>
                    <time>2.0000</time>
                </setting>
            </traverse>
            <output>/sim/model/controls/chute-available</output>
        </kinematic>


     </channel>


    <channel name="Electric Master">
        <summer name="Electric Master Switch">
            <input>/controls/electric/master-switch</input>
            <clipto>
                <min>0.0000</min>
                <max>1.0000</max>
            </clipto>
        </summer>

        <switch name="Battery Switch">
            <default value="0"/>
            <test  logic="AND" value="1">
                /controls/electric/master-switch == 1
            </test>
            <output>/controls/electric/battery-switch</output>
        </switch>

        <switch name="External Power">
            <default value="0"/>
            <test  logic="AND" value="1">
                /controls/electric/master-switch == 1
            </test>
            <output>/controls/electric/external-power</output>
        </switch>

        <switch name="Engine0 Master Bat">
            <default value="0"/>
            <test  logic="AND" value="1">
                /controls/electric/master-switch == 1
            </test>
            <output>/controls/engines/engine[0]/master-bat</output>
        </switch>

        <switch name="Engine1 Master Bat">
            <default value="0"/>
            <test  logic="AND" value="1">
                /controls/electric/master-switch == 1
            </test>
            <output>/controls/engines/engine[1]/master-bat</output>
        </switch>

        <switch name="Master Avionics">
            <default value="0"/>
            <test  logic="AND" value="1">
                /controls/electric/master-switch == 1
            </test>
            <output>/controls/switches/master-avionics</output>
        </switch>

        <switch name="Instruments Factor">
            <default value="0"/>
            <test  logic="AND" value="1">
                /controls/electric/master-switch == 1
                /systems/electrical/outputs/instrument-lights gt 27
            </test>
        </switch>

        <pure_gain name="Instruments Lighting">
            <input>fcs/instruments-factor</input>
            <gain>fcs/lighting-instruments-norm</gain>
            <output>/controls/lighting/instruments-norm</output>
        </pure_gain>

    </channel>

    <channel name="Outdoor Lighting">
            <switch name="blinker-sw">
                <default value="/instrumentation/lights/blinker-kinemat-in"/>
                <test logic="AND" value="1">
                    /instrumentation/lights/blinker-kinemat-in == 0
                    /instrumentation/lights/blinker-kinemat-out == 0
                </test>
                <test logic="AND" value="0">
                    /instrumentation/lights/blinker-kinemat-in == 1
                    /instrumentation/lights/blinker-kinemat-out == 1
                </test>
                <output>/instrumentation/lights/blinker-kinemat-in</output>
        </switch>

        <kinematic name="blinker-norm">
            <input>/instrumentation/lights/blinker-kinemat-in</input>
            <traverse>
                <setting>
                    <position>0</position>
                    <time>0</time>
                </setting>
                <setting>
                    <position>1</position>
                    <time>1</time>
                </setting>
            </traverse>
            <output>/instrumentation/lights/blinker-kinemat-out</output>
        </kinematic>

        <switch name="beacon-sw">
            <default value="0"/>
            <test logic="AND" value="1">
                /instrumentation/lights/blinker-kinemat-out > 0.90
                /instrumentation/lights/blinker-kinemat-out lt 0.97
            </test>
            <output>/instrumentation/lights/beacon-on</output>
        </switch>

        <switch name="landing light">
            <default value="0"/>
            <test logic="AND" value="1">
                /surface-positions/gear-pos-norm  == 1
                /systems/electrical/outputs/landing-light  gt 27
                /controls/lighting/landing-lights  == 1
            </test>
        </switch>

        </channel>

        <channel name="Engine">

            <kinematic name="Cutoff Switch Delay">
                <input>fcs/cutoff-switch</input>
                <traverse>
                    <setting>
                        <position>0.0000</position>
                        <time>0.0000</time>
                    </setting>
                    <setting>
                        <position>1.0000</position>
                        <time>1.0000</time>
                    </setting>
                </traverse>
            </kinematic>

            <pure_gain name="Throttle0 Cmd">
                <input>fcs/throttle-cmd-norm[0]</input>
                <gain>fcs/cutoff-switch-delay</gain>
            </pure_gain>
            <pure_gain name="Throttle1 Cmd">
                <input>fcs/throttle-cmd-norm[1]</input>
                <gain>fcs/cutoff-switch-delay</gain>
            </pure_gain>

            <pure_gain name="Throttle1">
                <input>fcs/throttle1-cmd</input>
                <gain>2</gain>
                <output>fcs/throttle-pos-norm[1]</output>
            </pure_gain>
            <pure_gain name="Throttle0">
                <input>fcs/throttle0-cmd</input>
                <gain>2</gain>
                <output>fcs/throttle-pos-norm[0]</output>
            </pure_gain>

            <!--<pure_gain name="Throttle0 Control">
                <input>/controls/engines/engine[0]/throttle</input>
                <gain>fcs/cutoff-switch-delay</gain>
                <output>/controls/engines/engine[0]/throttle</output>
            </pure_gain>
            <pure_gain name="Throttle1 Control">
                <input>/controls/engines/engine[1]/throttle</input>
                <gain>fcs/cutoff-switch-delay</gain>
                <output>/controls/engines/engine[1]/throttle</output>
            </pure_gain>-->


            <switch name="Fuel Pump0 Cmd">
                <default value="0"/>
                <test  logic="AND" value="1">
                    fcs/cutoff-switch == 1
                </test>
            </switch>
            <pure_gain name="Fuel Pump0">
                <input>fcs/fuel-pump0-cmd</input>
                <gain>1</gain>
                <output>/controls/engines/engine[0]/fuel-pump</output>
            </pure_gain>

            <switch name="Fuel Pump1 Cmd">
                <default value="0"/>
                <test  logic="AND" value="1">
                    fcs/cutoff-switch == 1
                </test>
            </switch>
            <pure_gain name="Fuel Pump1">
                <input>fcs/fuel-pump1-cmd</input>
                <gain>1</gain>
                <output>/controls/engines/engine[1]/fuel-pump</output>
            </pure_gain>

            <switch name="Cutoff0 Cmd">
                <default value="1"/>
                <test  logic="AND" value="0">
                    fcs/cutoff-switch-delay == 1
                    fcs/fuel-pump0-cmd == 1
                    /systems/electrical/outputs/fuel-pump gt 27
                </test>
                <output>/controls/engines/engine[0]/cutoff-cmd</output>
            </switch>

            <switch name="Cutoff1 Cmd">
                <default value="1"/>
                <test  logic="AND" value="0">
                    fcs/cutoff-switch-delay == 1
                    fcs/fuel-pump1-cmd == 1
                    /systems/electrical/outputs/fuel-pump gt 27
                </test>
                <output>/controls/engines/engine[1]/cutoff-cmd</output>
            </switch>

    </channel>


    </flight_control>
    <aerodynamics>
        <alphalimits>
            <documentation>

            </documentation>
            <min unit="DEG">-7</min>
            <max unit="DEG">15</max>
        </alphalimits>
        <function name="aero/function/kCDge">
            <description>Change_in_drag_due_to_ground_effect</description>
            <product>
                <table>
                    <independentVar>aero/h_b-mac-ft</independentVar>
                    <tableData>
                            0.0000	1.2000
                          0.1000	1.1500
                          0.1500	1.0900
                          0.2000	1.0200
                          1.1000	1.0000
                    </tableData>
                </table>
                </product>
            </function>
            <function name="aero/function/kCLge">
            <description>Change_in_lift_due_to_ground_effect</description>
            <product>
                  <table>
                      <independentVar>aero/h_b-mac-ft</independentVar>
                      <tableData>
                          0.0000  1.2290
                          0.1000  1.1240
                          0.1500  1.1160
                          0.2000  1.1240
                          0.3000  1.1050
                          0.4000  1.0410
                          0.5000  1.0340
                          0.6000  1.0190
                          0.7000  1.0080
                          0.8000  1.0030
                          0.9000  1.0010
                          1.0000  1.0000
                          1.1000  1.0000
                      </tableData>
                  </table>
            </product>
        </function>

        <axis name="DRAG">
            <documentation>
                tricky solution=> 4.5 mach column only to limit the speed ,  the model, must not be able to go over
            </documentation>
            <function name="aero/coefficient/CDalpha">
                <description>Drag_due_to_alpha</description>
                <product>
                    <property>aero/qbar-psf</property>
                    <property>metrics/Sw-sqft</property>
                    <property>aero/function/kCDge</property>
                      <table>
                          <independentVar lookup="row">aero/alpha-rad</independentVar>
                          <independentVar lookup="column">velocities/mach</independentVar>
                          <tableData>
                                            0.5000    1.4000     3.4000         4.5000
                              -0.4190       0.3800    0.0970    0.0970      1.0
                              -0.2790       0.2200    0.0250    0.0250      1.0
                              -0.1400       0.0700    0.0180    0.0180      1.0
                              -0.0700       0.0400    0.0100    0.0100      1.0
                              0.0000        0.0147    0.0074    0.0074      1.0
                              0.0700        0.0400    0.0100    0.0100      1.0
                              0.1400        0.0700    0.0180    0.0180      1.0
                              0.2790        0.2200    0.0250    0.0250      1.0
                              0.4190        0.3800    0.0970    0.0970      1.0
                              0.5590        0.8000    0.2030    0.2030      1.0
                              0.6980        1.0100    0.2570    0.2570      1.0
                          </tableData>
                      </table>
                </product>
            </function>

<documentation>from F18A of Mathias Froehlich</documentation>

            <function name="aero/coefficient/CDi">
                <description>Drag_induced</description>
                <product>
                    <property>aero/qbar-psf</property>
                    <property>metrics/Sw-sqft</property>
                    <property>aero/function/kCDge</property>
                      <table>
                          <independentVar>aero/alpha-rad</independentVar>
                          <tableData>
                              -0.3490    0.2270
                              -0.2620    0.0670
                              -0.1750    0.0480
                              -0.0870    0.0060
                              0.0000    0.0060
                              0.0700    0.0130
                              0.1400    0.0200
                              0.2090    0.0470
                              0.2790    0.0670
                              0.3490    0.2120
                              0.4190    0.2270
                              0.4890    0.3310
                              0.5590    0.4740
                              0.6980    0.2120
                              0.7850    0.9130
                              0.8730    0.7210
                          </tableData>
                      </table>
                </product>
            </function>
            <documentation>from concorde</documentation>
             <function name="aero/coefficient/CDmach">
                <description>Drag_due_to_mach</description>
                <product>
                    <property>aero/qbar-psf</property>
                    <property>metrics/Sw-sqft</property>
                      <table>
                          <independentVar>velocities/mach</independentVar>
                          <tableData>
                              0.0000	0.0000
                              0.7900	0.0000
                              1.1000	0.0230
                              1.1500	0.0140
                              1.8000	0.0070
                          </tableData>
                      </table>
                </product>
            </function>

            <function name="aero/coefficient/CDde">
                <description>Drag_due_to_Elevator_Deflection</description>
                <product>
                    <property>aero/qbar-psf</property>
                    <property>metrics/Sw-sqft</property>
                    <table>
                          <independentVar>fcs/elevator-pos-norm</independentVar>
                          <tableData>
                              -1.000    -0.00165
                              -0.03	    -0.00165
                              0.0000    0.00
                             1.000      0.0550
                          </tableData>
                      </table>
                </product>
            </function>

            <function name="aero/coefficient/CDgear">
                <description>Drag_due_to_gear</description>
                <product>
                    <property>aero/qbar-psf</property>
                    <property>metrics/Sw-sqft</property>
                    <property>fcs/gear-surface-position</property>
                    <value>0.0200</value>
                </product>
            </function>

            <function name="aero/coefficient/CDsb">
                <description>Drag_due_to_Chute</description>
                <product>
                    <property>aero/qbar-psf</property>
                    <property>metrics/Sw-sqft</property>
                    <property>fcs/brake-chute-selector</property>
                    <value>0.3</value>
                </product>
            </function>

            <function name="aero/coefficient/CDbeta">
                <description>Drag_due_to_sideslip</description>
                <product>
                    <property>aero/qbar-psf</property>
                    <property>metrics/Sw-sqft</property>
                      <table>
                          <independentVar>aero/beta-rad</independentVar>
                          <tableData>
                              -1.5700    1.2300
                              -0.2600    0.0500
                              0.0000    0.0000
                              0.2600    0.0500
                              1.5700    1.2300
                          </tableData>
                      </table>
                </product>
            </function>

        </axis>

        <axis name="SIDE">
            <function name="aero/coefficient/CYb">
                <description>Side_force_due_to_beta</description>
                <product>
                    <property>aero/qbar-psf</property>
                    <property>metrics/Sw-sqft</property>
                    <property>aero/beta-rad</property>
                    <value>-1.0000</value>
                </product>
            </function>
        </axis>

        <axis name="LIFT">
            <documentation>from F18A of Mathias Froehlich</documentation>
            <function name="aero/coefficient/CLalpha">
                <description>Lift_due_to_alpha</description>
                <product>
                    <property>aero/qbar-psf</property>
                    <property>metrics/Sw-sqft</property>
                    <property>aero/function/kCLge</property>
                      <table>
                          <independentVar>aero/alpha-rad</independentVar>
                          <tableData>
                                -0.2443460 -1.03860
                                -0.1745329 -0.880907
                                -0.1047197 -0.551318
                                -0.0349065 -0.216206
                                0.0349065  0.154461
                                0.1047197  0.560857
                                0.1745329  0.951575
                                0.2443460  1.24168
                                0.3141592  1.39786
                                0.3839724  1.53103
                                0.4537856  1.64110
                                0.5235987  1.77724
                                0.5934119  1.88652
                                0.6632251  1.88940
                                0.7330382  1.80975
                                0.8028514  1.68556
                                0.8726646  1.57524
                                0.9424777  1.46011
                                1.0122909  1.31884
                                1.0821041  1.17117
                                1.1519173  1.02151
                                1.2217304  0.858875
                                1.2915436  0.685334
                                1.3613568  0.529482
                          </tableData>
                      </table>
                </product>
            </function>
            <documentation>from F18A of Mathias Froehlich</documentation>
            <function name="aero/coefficient/CLqalpha">
                <description>Lift_due_to_alpha_and_pitch_rate</description>
                <product>
                    <property>aero/qbar-psf</property>
                    <property>metrics/Sw-sqft</property>
                    <property>aero/ci2vel</property>
                    <property>velocities/q-aero-rad_sec</property>
                      <table>
                          <independentVar>aero/alpha-rad</independentVar>
                          <tableData>
                                -0.2443460 4.51
                                -0.1745329 4.51
                                -0.1047197 4.51
                                -0.0349065 4.5175
                                0.0349065 4.3825
                                0.1047197 3.9625
                                0.1745329 3.63
                                0.2443460 3.4325
                                0.3141592 3.375
                                0.3839724 3.47
                                0.4537856 3.6025
                                0.5235987 3.9625
                                0.5934119 5.095
                                0.6632251 6.875
                                0.7330382 8.47
                                0.8028514 9.15
                                0.8726646 7.55
                                0.9424777 5.95
                                1.0122909 5.28
                                1.0821041 5.04
                                1.1519173 4.95
                                1.2217304 4.95
                                1.2915436 4.87
                                1.3613568 4.73
                                1.4311699 4.57
                                1.5009831 4.39
                                1.5707963 4.15
                          </tableData>
                      </table>
                </product>
            </function>

            <function name="aero/coefficient/CLde">
                <description>Lift_due_to_Elevator_Deflection</description>
                <product>
                    <property>aero/qbar-psf</property>
                    <property>metrics/Sw-sqft</property>
                    <property>fcs/elevator-pos-rad</property>
                    <value>0.2000</value>
                </product>
            </function>
        </axis>

        <axis name="ROLL">
            <documentation>from F18A of Mathias Froehlich</documentation>
            <function name="aero/coefficient/Crollb">
                <description>Side_force_due_to_beta</description>
                <product>
                    <property>aero/qbar-psf</property>
                    <property>metrics/Sw-sqft</property>
                    <property>metrics/bw-ft</property>
                    <property>aero/beta-rad</property>
                      <table>
                          <independentVar>aero/alpha-rad</independentVar>
                          <tableData>
                                -2.4435e-01  -2.1211e-03
                                -1.7453e-01  -2.1211e-03
                                -1.0472e-01  -2.5297e-02
                                -3.4907e-02  -4.8473e-02
                                3.4907e-02  -7.2803e-02
                                1.0472e-01  -9.7473e-02
                                1.7453e-01  -1.2106e-01
                                2.4435e-01  -1.5875e-01
                                3.1416e-01  -1.9325e-01
                                3.8397e-01  -1.9925e-01
                                4.5379e-01  -1.8133e-01
                                5.2360e-01  -1.3508e-01
                                5.9341e-01  -7.0218e-02
                                6.6323e-01  -6.5642e-02
                                7.3304e-01  -9.3825e-02
                                8.0285e-01  -1.2774e-01
                                8.7266e-01  -1.4088e-01
                                9.4248e-01  -1.4191e-01
                                1.0123e+00  -1.4008e-01
                                1.0821e+00  -1.4418e-01
                                1.1519e+00  -1.5526e-01
                                1.2217e+00  -1.6662e-01
                                1.2915e+00  -1.6195e-01
                                1.3614e+00  -1.5800e-01
                                1.4312e+00  -1.5501e-01
                                1.5010e+00  -1.5315e-01
                                1.5708e+00  -1.5242e-01
                          </tableData>
                      </table>
                </product>
            </function>
    <documentation>from F18A of Mathias Froehlich</documentation>
    <!-- croll += (b/(2*v))*croll_p*p -->
            <function name="aero/coefficient/Crollp">
                <description>Side_force_due_to_beta</description>
                <product>
                    <property>aero/qbar-psf</property>
                    <property>metrics/Sw-sqft</property>
                    <property>metrics/bw-ft</property>
                    <property>aero/bi2vel</property>
                    <property>velocities/p-aero-rad_sec</property>
                      <table>
                          <independentVar>aero/alpha-rad</independentVar>
                          <tableData>
                                -2.4435e-01  -4.0400e-01
                                -1.7453e-01  -4.0400e-01
                                -1.0472e-01  -4.0400e-01
                                -3.4907e-02  -4.0400e-01
                                3.4907e-02  -4.0400e-01
                                1.0472e-01  -4.0400e-01
                                1.7453e-01  -3.5800e-01
                                2.4435e-01  -3.0100e-01
                                3.1416e-01  -2.6500e-01
                                3.8397e-01  -2.2100e-01
                                4.5379e-01  -3.0850e-01
                                5.2360e-01  -4.5500e-01
                                5.9341e-01  -4.9750e-01
                                6.6323e-01  -5.0000e-01
                                7.3304e-01  -2.8000e-01
                                8.0285e-01   2.0000e-03
                                8.7266e-01  -1.9000e-01
                                9.4248e-01  -2.1400e-01
                                1.0123e+00  -2.3200e-01
                                1.0821e+00  -2.5000e-01
                                1.1519e+00  -2.6800e-01
                                1.2217e+00  -2.8000e-01
                                1.2915e+00  -2.8800e-01
                                1.3614e+00  -2.9600e-01
                                1.4312e+00  -3.0400e-01
                                1.5010e+00  -3.1000e-01
                                1.5708e+00  -3.1000e-01
                          </tableData>
                      </table>
                </product>
            </function>
    <documentation>from F18A of Mathias Froehlich</documentation>
    <!-- croll += (b/(2*v))*croll_r*r -->
            <function name="aero/coefficient/Crollr">
                <description>Side_force_due_to_beta</description>
                <product>
                    <property>aero/qbar-psf</property>
                    <property>metrics/Sw-sqft</property>
                    <property>metrics/bw-ft</property>
                    <property>aero/bi2vel</property>
                    <property>velocities/r-aero-rad_sec</property>
                      <table>
                          <independentVar>aero/alpha-rad</independentVar>
                          <tableData>
                                -2.4435e-01   1.2300e-02
                                -1.7453e-01   1.2300e-02
                                -1.0472e-01   1.2300e-02
                                -3.4907e-02   3.3550e-02
                                3.4907e-02   8.7550e-02
                                1.0472e-01   1.4730e-01
                                1.7453e-01   1.9430e-01
                                2.4435e-01   2.2030e-01
                                3.1416e-01   2.2855e-01
                                3.8397e-01   2.3580e-01
                                4.5379e-01   2.5405e-01
                                5.2360e-01   2.9730e-01
                                5.9341e-01   3.2555e-01
                                6.6323e-01   2.9030e-01
                                7.3304e-01   2.3340e-01
                                8.0285e-01   1.8800e-01
                                8.7266e-01   1.4680e-01
                                9.4248e-01   1.2520e-01
                                1.0123e+00   1.0660e-01
                                1.0821e+00   9.0600e-02
                                1.1519e+00   7.6600e-02
                                1.2217e+00   6.3800e-02
                                1.2915e+00   6.4600e-02
                                1.3614e+00   6.4800e-02
                                1.4312e+00   5.3200e-02
                                1.5010e+00   3.0600e-02
                                1.5708e+00   9.8000e-03
                          </tableData>
                      </table>
                </product>
            </function>

    <documentation>from F18A of Mathias Froehlich</documentation>
    <!-- croll += croll_dr*dr -->
            <function name="aero/coefficient/Crollrudder">
                <description>Side_force_due_to_beta</description>
                <product>
                    <property>aero/qbar-psf</property>
                    <property>metrics/Sw-sqft</property>
                    <property>metrics/bw-ft</property>
                    <property>fcs/rudder-pos-rad</property>
                      <table>
                          <independentVar>aero/alpha-rad</independentVar>
                          <tableData>
                                -2.4435e-01   1.6403e-02
                                -1.7453e-01   1.6403e-02
                                -1.0472e-01   1.6403e-02
                                -3.4907e-02   1.5425e-02
                                3.4907e-02   1.3701e-02
                                1.0472e-01   1.2536e-02
                                1.7453e-01   1.2070e-02
                                2.4435e-01   1.1883e-02
                                3.1416e-01   1.0345e-02
                                3.8397e-01   7.1299e-03
                                4.5379e-01   3.9610e-03
                                5.2360e-01   2.0038e-03
                                5.9341e-01   1.0718e-03
                                6.6323e-01   2.7960e-04
                                7.3304e-01  -1.9740e-03
                                8.0285e-01  -4.9695e-03
                                8.7266e-01  -6.2258e-03
                                9.4248e-01  -4.4886e-03
                                1.0123e+00  -1.5099e-03
                                1.0821e+00   2.1101e-03
                                1.1519e+00   5.4318e-03
                                1.2217e+00   7.1765e-03
                                1.2915e+00   5.4914e-03
                                1.3614e+00   4.3935e-03
                                1.4312e+00   3.8567e-03
                                1.5010e+00   3.7075e-03
                                1.5708e+00   3.6255e-03
                          </tableData>
                      </table>
                </product>
            </function>
            <!--<function name="aero/coefficient/Clb">
                <description>Roll_moment_due_to_beta</description>
                <product>
                    <property>aero/qbar-psf</property>
                    <property>metrics/Sw-sqft</property>
                    <property>metrics/bw-ft</property>
                    <property>aero/beta-rad</property>
                    <value>-0.1000</value>
                </product>
            </function>
            <function name="aero/coefficient/Clp">
                <description>Roll_moment_due_to_roll_rate</description>
                <product>
                    <property>aero/qbar-psf</property>
                    <property>metrics/Sw-sqft</property>
                    <property>metrics/bw-ft</property>
                    <property>aero/bi2vel</property>
                    <property>velocities/p-aero-rad_sec</property>
                    <value>-0.18</value>
                </product>
            </function>
            <function name="aero/coefficient/Clr">
                <description>Roll_moment_due_to_yaw_rate</description>
                <product>
                    <property>aero/qbar-psf</property>
                    <property>metrics/Sw-sqft</property>
                    <property>metrics/bw-ft</property>
                    <property>aero/bi2vel</property>
                    <property>velocities/r-aero-rad_sec</property>
                    <value>0.1000</value>
                </product>
            </function>-->
            <function name="aero/coefficient/Clda">
                <description>Roll_moment_due_to_aileron</description>
                <product>
                    <property>aero/qbar-psf</property>
                    <property>metrics/Sw-sqft</property>
                    <property>metrics/bw-ft</property>
                    <property>fcs/left-aileron-pos-rad</property>
                      <table>
                          <independentVar>velocities/mach</independentVar>
                          <tableData>
                              0.0000    0.1200
                              2.0000    0.0400
                          </tableData>
                      </table>
                </product>
            </function>
            <!--<function name="aero/coefficient/Cldr">
                <description>Roll_moment_due_to_rudder</description>
                <product>
                    <property>aero/qbar-psf</property>
                    <property>metrics/Sw-sqft</property>
                    <property>metrics/bw-ft</property>
                    <property>fcs/rudder-pos-rad</property>
                    <value>0.0100</value>
                </product>
            </function>-->
        </axis>

        <axis name="PITCH">
            <function name="aero/coefficient/Cmalpha">
                <description>Pitch_moment_due_to_alpha</description>
                <product>
                    <property>aero/qbar-psf</property>
                    <property>metrics/Sw-sqft</property>
                    <property>metrics/cbarw-ft</property>
                    <property>aero/alpha-rad</property>
                    <value>-0.3000</value>
                </product>
            </function>
            <function name="aero/coefficient/Cmde">
                <description>Pitch_moment_due_to_elevator</description>
                <product>
                    <property>aero/qbar-psf</property>
                    <property>metrics/Sw-sqft</property>
                    <property>metrics/cbarw-ft</property>
                    <property>fcs/elevator-pos-rad</property>
                      <table>
                          <independentVar>velocities/mach</independentVar>
                          <tableData>
                              0.0000    -0.8000
                              2.0000    -0.2000
                          </tableData>
                      </table>
                </product>
            </function>
            <function name="aero/coefficient/Cmq">
                <description>Pitch_moment_due_to_pitch_rate</description>
                <product>
                    <property>aero/qbar-psf</property>
                    <property>metrics/Sw-sqft</property>
                    <property>metrics/cbarw-ft</property>
                    <property>aero/ci2vel</property>
                    <property>velocities/q-aero-rad_sec</property>
                    <value>-18.0000</value>
                </product>
            </function>
            <function name="aero/coefficient/Cmadot">
                <description>Pitch_moment_due_to_alpha_rate</description>
                <product>
                    <property>aero/qbar-psf</property>
                    <property>metrics/Sw-sqft</property>
                    <property>metrics/cbarw-ft</property>
                    <property>aero/ci2vel</property>
                    <property>aero/alphadot-rad_sec</property>
                    <value>-9.0000</value>
                </product>
            </function>
        </axis>

        <axis name="YAW">
            <function name="aero/coefficient/Cnb">
                <description>Yaw_moment_due_to_beta</description>
                <product>
                    <property>aero/qbar-psf</property>
                    <property>metrics/Sw-sqft</property>
                    <property>metrics/bw-ft</property>
                    <property>aero/beta-rad</property>
                    <value>0.1200</value>
                </product>
            </function>
            <function name="aero/coefficient/Cnr">
                <description>Yaw_moment_due_to_yaw_rate</description>
                <product>
                    <property>aero/qbar-psf</property>
                    <property>metrics/Sw-sqft</property>
                    <property>metrics/bw-ft</property>
                    <property>aero/bi2vel</property>
                    <property>velocities/r-aero-rad_sec</property>
                    <value>-0.1500</value>
                </product>
            </function>
            <function name="aero/coefficient/Cndr">
                <description>Yaw_moment_due_to_rudder</description>
                <product>
                    <property>aero/qbar-psf</property>
                    <property>metrics/Sw-sqft</property>
                    <property>metrics/bw-ft</property>
                    <property>fcs/rudder-pos-rad</property>
                    <value>-0.1000</value>
                </product>
            </function>
            <function name="aero/coefficient/Cnda">
                <description>Adverse_yaw</description>
                <product>
                    <property>aero/qbar-psf</property>
                    <property>metrics/Sw-sqft</property>
                    <property>metrics/bw-ft</property>
                    <property>fcs/left-aileron-pos-rad</property>
                    <value>0.0000</value>
                </product>
            </function>
        </axis>
    </aerodynamics>
</fdm_config>
